*HEADING Frame test1 dload
*NODE, NSET=Nall
1,  0., 0., 0.
2,  0., 0., 100.
3,  100., 0., 100.
4,  100., 0., 0.
*ELEMENT, TYPE=B31, ELSET=Eall
1, 1, 2
2, 2, 3
3, 3, 4
*BEAM SECTION, SECTION=GENERAL, ELSET=Eall
10., 100., 200., 300.
0, 0, 1.
30E6, 12E6, 0.4
**
** Node 1 & 4 fixed
**
*BOUNDARY
1, 1, 6
4, 1, 6
**
** Load case #1 - Global Z line load of -1000 per length unit
**
*STEP
*STATIC
*DLOAD
2,PZ,-1000
*NODE PRINT, TOTALS=YES, NSET=Nall
 U, RF
*NODE FILE
 U, RF
*END STEP
