*HEADING Frame test - gravity loading
**
** Node definitions
**
*NODE, NSET=Nall
1,  0., 0., 0.
2,  0., 0., 100.
3,  100., 0., 100.
4,  100., 0., 0.
*NSET, NSET=NFix
1,4
**
** Element definitions
**
*ELEMENT, TYPE=B31, ELSET=Eall
1, 1, 2
2, 2, 3
3, 3, 4
**
** Beam sections
**
*BEAM SECTION, SECTION=GENERAL, ELSET=Eall
**      Ax      Ixx     Iyy     Izz     Ay      Az
        10.,    100.,   200.,   300.,   0.,     0.
**      Nx      Ny      Nz
        0,      0,      1.
**      E       G       nu      rho
        30E6,   12E6,   0.4,    7850
**
** Node 1 & 4 fixed
**
*BOUNDARY
NFix, 1, 6
**
** Load case #1 - self weight
**
*STEP
*STATIC
*DLOAD
Eall,GRAV,9.8152,0.,0.,-1.
**
** Result selections
**
*NODE PRINT, TOTALS=YES, NSET=Nall
 U, RF
*NODE PRINT, TOTALS=ONLY, NSET=NFix
 RF
*EL PRINT, SECTIONDELTA=25, ELSET=Eall
 SF
*NODE FILE
 U, RF
*END STEP
