*HEADING Tower test case
*INCLUDE, INPUT=frame_tower.msh
**
** RHS 300x10 steel section
**
*BEAM SECTION, SECTION=GENERAL, ELSET=Eall
**  Ax              Ixx           Iyy         Izz         Ay      Az
    1.16000E-02, 3.25600E-04, 1.62800E-04, 1.62800E-04
**      Nx      Ny      Nz
        0,      0,      1.
**      E       G       nu      rho
    200E9,  80E9,       0.4,    7850.
**
** Node at base fixed
**
*NSET, NSET=Nfix
21,22,23,24
*NSET, NSET=Nfree, GENERATE
1,20
*BOUNDARY
Nfix, 1, 3
**
** Load case #1 - gravity
**
*STEP
*STATIC
*DLOAD
Eall,GRAV,9.8152,0.,0.,-1.
*NODE PRINT, TOTALS=ONLY, NSET=Nall
 U, RF
*NODE PRINT, TOTALS=YES, NSET=Nfree
 RF
*NODE PRINT, TOTALS=YES, NSET=Nfix
 RF
*NODE FILE
 U, RF
*END STEP
